# Задание 1 | Задание 3
f(t) := sin(t)/t
sum(1/(k + 1)^2, k = 1 .. ∞) → π^2/6 - 1
f(t) laplace → atan(1/s)
# Задание 2
F(s) := atan(1/s)
x^3*ln(x)/(3*x + 1) == 0 solve, x → [0; 1]
F(s) invlaplace → sin(t)/t
# Правильный корень 1, второй отсекается ОДЗ. Построим график.
y(x) := x^3*ln(x)/(3*x + 1)
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# Решение с помощью root
x[1] := root(y(x), x, 0.5, 1.5)
x[1] = 1
