# Задание 1. Зададим матрицы
a := 3
b := 2.1
c := 0.91
m := 1.2
k := 1
n := 1
A := [a, b, c; -m, n, k; c, b, -a]
B := [b, -c; m, b; n, k]
C := [n, a; m, b]
D := [a - b; -n; c + b]
K := [n, -a, a + b; m, b, n + m; c, n, c - b]
M := [b - a, c]
# Задание 2. Выполним действия в соответствии с вариантом
m*K = [1.2, -3.6, 6.12; 1.44, 2.52, 2.64; 1.092, 1.2, -1.428]
A^2 + K = [8.3081, 7.311, 7.2; -2.69, 2.68, -0.892; -1.61, -1.289, 10.7381]
A - K = [2, 5.1, -4.19; -2.4, -1.1, -1.2; 0, 1.1, -1.81]
A*K - K = [5.3481, -0.68, 13.7371; -0.29, 4.6, -7.31; -0.21, -2.32, 14.021]
b*C^-3 = [-17.4104, 20.7387; 8.29547, -9.80622]
C^-3 = [-8.29067, 9.87556; 3.95022, -4.66963]
# Задание 3. Найдём ранг матрицы A
rank(A) = 3
# Задание 4.
transpose(B) → [2.1, 1.2, 1; -0.91, 2.1, 1]
A^-1 → [
    0.211879370012, -0.341125785719, -0.0494385196695;
    0.111755981438, 0.408308164003, 0.170002035704;
    0.142499262577, 0.182340893134, -0.229328259307
]
# Задание 5.
K^-1 = [0.252429, -0.0821913, 0.92989; -0.184259, 0.31324, -0.210582; 0.0381948, 0.200375, -0.306203]
# Задание 6.
|A| = -24.0703
