# Задание 1. Таблица узлов
f(x) := e^(-(x + sin(x)))
N := 30
a := 2
b := 5
h := (b - a)/10 = 0.3
i := 0 .. 10
x[i] := a + h*i
y[i] := f(x[i])
y[i] = [0.054514; 0.0475628; 0.0443563; 0.0433153; 0.0432125; 0.0428857; 0.0412484; 0.0375635; 0.0317965; 0.0247216; 0.0175786]
x[i] = [2; 2.3; 2.6; 2.9; 3.2; 3.5; 3.8; 4.1; 4.4; 4.7; 5]
# Задание 2. Отыскание интерполяционного многочлена. Построение матрицы Вандермонда
g(i, j) := x[i]^j
V := matrix(11, 11, g)
V = [
    1, 2, 4, 8, 16, 32, 64, 128, 256, 512, 1024;
    1, 2.3, 5.29, 12.167, 27.9841, 64.3634, 148.036, 340.483, 783.11, 1801.15, 4142.65;
    1, 2.6, 6.76, 17.576, 45.6976, 118.814, 308.916, 803.181, 2088.27, 5429.5, 14116.7;
    1, 2.9, 8.41, 24.389, 70.7281, 205.111, 594.823, 1724.99, 5002.46, 14507.1, 42070.7;
    1, 3.2, 10.24, 32.768, 104.858, 335.544, 1073.74, 3435.97, 10995.1, 35184.4, 112590;
    1, 3.5, 12.25, 42.875, 150.062, 525.219, 1838.27, 6433.93, 22518.8, 78815.6, 275855;
    1, 3.8, 14.44, 54.872, 208.514, 792.352, 3010.94, 11441.6, 43477.9, 165216, 627821;
    1, 4.1, 16.81, 68.921, 282.576, 1158.56, 4750.1, 19475.4, 79849.3, 327382, 1342266;
    1, 4.4, 19.36, 85.184, 374.81, 1649.16, 7256.31, 31927.8, 140482, 618122, 2719736;
    1, 4.7, 22.09, 103.823, 487.968, 2293.45, 10779.2, 50662.3, 238113, 1119130, 5259913;
    1, 5, 25, 125, 625, 3125, 15625, 78125, 390625, 1953125, 9765625
]
# Коэффициенты интерполяционного многочлена
k := lsolve(V, y) = [1.93812; -5.16776; 6.82055; -5.55869; 3.03145; -1.14155; 0.298352; -0.0531446; 0.00614641; -0.000415313; 1.24224e-5]
P(x) := k[0] + k[1]*x + k[2]*x^2 + k[3]*x^3 + k[4]*x^4 + k[5]*x^5 + k[6]*x^6 + k[7]*x^7 + k[8]*x^8 + k[9]*x^9 + k[10]*x^10
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# Задание 3. Многочлен Лагранжа. Функция term нужна для избежания ошибки с нулём
term(i, j, q) := if(i == j, 1, (q - x[j])/if(i == j, 1, x[i] - x[j]))
L(q) := sum(y[i]*product(term(i, j, q), j = 0 .. 10), i = 0 .. 10)
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# Задание 4. 1 интерполяционная формула Ньютона. Посчитаем конечные разности.
o := 1 .. 10
d(o, i) := if(o > 0, d(o - 1, i + 1) - d(o - 1, i), y[i])
t(q) := (q - x[0])/h
N1(q) := y[0] + sum(d(k, 0)*product(t(q) - m, m = 0 .. k - 1)/k!, k = 1 .. 10)
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# Вторая формула
t2(q) := (q - x[10])/h
N2(q) := y[10] + sum(d(k, 10 - k)*product(t2(q) + m, m = 0 .. k - 1)/k!, k = 1 .. 10)
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# Задание 5. Линейная интерполяция со встроенной функцией
z(q) := linterp(x, y, q)
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# Задание 6. Сплайн-интерполяция
vs := lspline(x, y)
vp := pspline(x, y)
vc := cspline(x, y)
Sl(t) := interp(vs, x, y, t)
Sp(t) := interp(vp, x, y, t)
Sc(t) := interp(vc, x, y, t)
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# Задание 7. Экстраполяция
h' := 0.1
n := 10*(b - a)
i := 0 .. n
xi[i] := a + i/10
yi[i] := f(xi[i])
m := 7
nfut := 10
ypred := predict(yi, m, nfut)
ypred = [0.015388; 0.0133479; 0.0114808; 0.00980208; 0.00832015; 0.00703706; 0.00594924; 0.00504883; 0.00432526; 0.00376671]
xpred := [5.1; 5.2; 5.3; 5.4; 5.5; 5.6; 5.7; 5.8; 5.9; 6.0]
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