# Задание исходных данных
a := 2
b := 5
N := 30
f(x) := exp(-x - sin(x))
# Задание 8
i := 0 .. N - 1
x[i] := a + i*(b - a)/(N - 1)
y[i] := f(x[i])
vr2 := regress(x, y, 2)
P2(t) := interp(vr2, x, y, t)
vr6 := regress(x, y, 6)
P6(t) := interp(vr6, x, y, t)
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# Задание 9
k := slope(x, y)
c := intercept(x, y)
reg(t) := k*t + c
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# Задание 10
vr4 := regress(x, y, 4)
P4(t) := interp(vr4, x, y, t)
vl05 := loess(x, y, 0.5)
L05(t) := interp(vl05, x, y, t)
vl25 := loess(x, y, 2.5)
L25(t) := interp(vl25, x, y, t)
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# Задание 11
f1(t) := exp(-t^2/2)
f2(t) := 1/t
f3(t) := exp(-t)
F(t) := [f1(t); f2(t); f3(t)]
g := linfit(x, y, F)
G(t) := g[0]*f1(t) + g[1]*f2(t) + g[2]*f3(t)
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# Задание 12
ys_med := medsmooth(y, 5)
ys_k := ksmooth(x, y, 0.3)
ys_sup := supsmooth(x, y)
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