# Исходные данные и Задание 1.1
f(t) := cos(exp(|sin(3*t)|))
T := 2*π  # Исходные данные
w0 := 2*π/T
a0 := integral(2/T*f(t), t = 0 .. T)  # Нулевой член
# Энные члены
a(n) := integral(2/T*f(t)*cos(n*w0*t), t = 0 .. T)
b(n) := integral(2/T*f(t)*sin(n*w0*t), t = 0 .. T)
Амплитуда
C(n) := sqrt(a(n)^2 + b(n)^2)  # Гармоника
Фаза
g(t, n) := a(n)*cos(n*w0*t) + b(n)*sin(n*w0*t)
φ(n) := atan2(a(n), b(n))
i := 1 .. 10
a(i) = [0; -6.01976e-10; 0; 2.73535e-9; 0; 0.672983; 0; 1.05006e-6; 0; 0.000220538]
b(i) = [-3.95108e-17; 4.52796e-16; 1.67043e-16; -2.5115e-16; 5.56879e-16; -6.32492e-16; -2.63268e-16; -6.99395e-16; 1.07639e-16; 2.45182e-16]
C(i) = [0; 6.01976e-10; 0; 2.73535e-9; 0; 0.672983; 0; 1.05006e-6; 0; 0.000220538]
φ(i) = [-2.89176; 3.14159; 1.64334; -9.18165e-8; 1.33539; 0; -1.20912; -6.66051e-10; 1.38807; 1.11175e-12]
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# Гармонический синтез
S(t, l) := a0/2 + sum(a(n)*cos(n*w0*t) + b(n)*sin(n*w0*t), n = 1 .. l)
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# Графическое отображение амплитуд
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# Задание 1.2
M := 128
k := 0 .. M - 1
t[k] := k*2*π/M
v[k] := f(t[k])
V := fft(v)
i := 0 .. 64
amp[i] := |V[i]|
phase[i] := arg(V[i])
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# Обратное БПФ
VR := Re(ifft(V))
i := 0 .. 127
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# Зашумление и фильтрация
noise := rnd(2) - 1
s[k] := v[k] + noise
S := fft(s)
O := 2
Heviside(x) := if(x < 0, 0, 1)
i := 0 .. 64
Sfilt[i] := S[i]*Heviside(O - i)
h := Re(ifft(Sfilt))
i := 0 .. 127
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