# Исходные данные
# Треугольник Серпинского
TS := [0.5, 0, 0, 0, 0.5, 0; 0.5, 0, 0.5, 0, 0.5, 0; 0.5, 0, 0.25, 0, 0.5, 0.5]
# Детерминированный алгоритм | Рандомизированный алгоритм
apply_IFS(P, T) :=
    k ← 0
    res ← augment(T[0, 0]*P[:, 0] + T[0, 1]*P[:, 1] + T[0, 2], T[0, 3]*P[:, 0] + T[0, 4]*P[:, 1] + T[0, 5])
    for k ∈ 1 .. rows(T) - 1
        cur ← augment(T[k, 0]*P[:, 0] + T[k, 1]*P[:, 1] + T[k, 2], T[k, 3]*P[:, 0] + T[k, 4]*P[:, 1] + T[k, 5])
        res ← stack(res, cur)
    return res
chaos_game(P0, T, n) :=
    zero(i, j) ← 0
    pts ← matrix(n + 1, 2, zero)
    pts[0, 0] ← P0[0, 0]
    pts[0, 1] ← P0[0, 1]
    for i ∈ 1 .. n
        k ← floor(rnd(rows(T)))
        pts[i, 0] ← T[k, 0]*pts[i - 1, 0] + T[k, 1]*pts[i - 1, 1] + T[k, 2]
        pts[i, 1] ← T[k, 3]*pts[i - 1, 0] + T[k, 4]*pts[i - 1, 1] + T[k, 5]
    return pts
iterate_IFS(P0, T, n) :=
    P ← P0
    for i ∈ 1 .. n
        P ← apply_IFS(P, T)
    return P
P0 := [0.5, 0.5]
Pfinal := iterate_IFS(P0, TS, 10)
Pchaos := chaos_game(P0, TS, 10000)
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Папоротник
T := [
    0.7, 0, 0.1496, 0, 0.7, 0.2962;
    0.1, -0.43, 0.4478, 0.1732, 0.25, 0.0014;
    0.1, 0.43, 0.4445, -0.1732, 0.25, 0.1559;
    0, 0, 0.4987, 0, 0.3, 0.007
]
Pfd := iterate_IFS(P0, T, 10)
Pfc := chaos_game(P0, T, 10000)
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